# HERON CashFlow Problem Analytic
# Author: Konor Frick, 1/25/2022
Tax_rate := 25 %
Inflation := 0 %  # Inflation makes the calculation more messy. We will leave out for now.
Discount_Rate := 8 %
size_source := 2  # Size of the Generator is 2
elec_demand := 2  # Size of the Market Demand is 2
CAPEX_source := 10000*(size_source/10)^0.999
FOM_source := 100*(size_source/10)^0.999
steps := 21
sales := elec_demand*31.4*steps
Revenue := sales  # Total Revenue from Sales of the product.
VOM_source := steps*size_source
# Without Amortization:
N := 20  # Years
# Assume Variable OM is Taxable and Everything else is Tax Exempt
NPV(N) := sum(((1 - Tax_rate)*(-1*VOM_source) + (Revenue - FOM_source))/(1 + Discount_Rate)^n, n = 1 .. N) - CAPEX_source
# Final Answer after 20 Years
NPV(20) = 10439
# Individual Yearly Cash Flows.
Revenue = 1318.8
FOM_source = 20.0322
sales = 1318.8
VOM_source = 42
CAPEX_source = 2003.22
